// COMSOL Multiphysics 6.4.0.378 model "thermoelectric_generator.noSpheres.vp04b.mph"
// Thermoelectric Generator
// This example solves the heat transfer and electric field in a thermoelectric element. A temperature gradient is applied across the length of the element and the resultant potential difference is calculated using the Seeback effect.
// Outline of the model tree

Parameters
  T0 = 10[degC]  // Input Temperature
  L_element = 3[mm]  // Element length
  w_element = 1[mm]
  t_cu = 0.1[mm]
  r_cu = 0.1[mm]
  Nsph = 3
  I0 = 0[A]

Common definitions
  amth_ht: AmbientProperties "Ambient Thermal Properties (ht)" | Ish_amb = 0[W/m^2]

Geometry
  geom1 "Geometry 1" (3D, length unit mm)
    blk1: Block
      size = {w_element, w_element, L_element}
      layername = Layer 1
      layer = t_cu
      layernameold = Layer 1
      layertop = on
    elp1: Ellipsoid (disabled)
      semiaxes = {r_cu, r_cu, r_cu}
      pos = {w_element/2, w_element/2, 4*r_cu}
      contributeto = csel1
    arr1: Array (disabled)
      input = selection csel1
      size = {2, 2, Nsph}
      fullsize = {2, 2, Nsph}
      displ = {1.25*r_cu, 2.25*r_cu, 2.125*r_cu}
      indexattrtag = arr1.index
      indexattrtags = {arr1.index1, arr1.index2, arr1.index3}
      contributeto = csel1
    fin: Finalize "Form Union"

Materials
  mat1: Common "Copper" on domains 1, 3
    def: def "Basic"
      relpermeability = 1
      electricconductivity = 5.998e7[S/m]
      thermalexpansioncoefficient = 17e-6[1/K]
      heatcapacity = 385[J/(kg*K)]
      relpermittivity = 1
      density = 8960[kg/m^3]
      thermalconductivity = 400[W/(m*K)]
      seebeckcoefficient = 6.5e-6[V/K]
    Enu: Enu "Young's modulus and Poisson's ratio"
      E = 110e9[Pa]
      nu = 0.35
    linzRes: linzRes "Linearized resistivity"
      rho0 = 1.72e-8[ohm*m]
      alpha = 0.0039[1/K]
      Tref = 298[K]
  mat2: Common "Bismuth Antimony Telluride - (Bi0.5Sb0.5)2Te3" on domains 2
    def: def "Basic"
      heatcapacity = 154.4[J/(kg*K)]
      density = 7740[kg/m^3]
      seebeckcoefficient = S(T)
      electricconductivity = sigma(T)
      thermalconductivity = k(T)
      relpermittivity = 1
      int1: Interpolation "Seebeck coefficient"
        importedname = seeback_Coefficient.txt
        funcnametable = {S, 1}
        funcname = S
        table = {{100, 75e-6}, {150, 125e-6}, {200, 170e-6}, {250, 200e-6}, {300, 218e-6}, {350, 225e-6}, {400, 218e-6}}
        filecolumns = 2
        columnKeys = {col1, col2}
        columnType = {col1, arg, col2, value}
        funcnames = {col1, int1, col2, S}
        interp = cubicspline
        extrap = linear
        fununit = V/K
        argunit = K
        plotfuncname = S
        funcs = {{S, 1}}
        nargs = 1
      int2: Interpolation "Thermal conductivity"
        importedname = thermal_conductivity.txt
        funcnametable = {k, 1}
        funcname = k
        table = {{100, 25e-1}, {150, 20e-1}, {200, 15.5e-1}, {250, 13.5e-1}, {300, 12.8e-1}, {350, 13.5e-1}, {400, 17.5e-1}}
        filecolumns = 2
        columnKeys = {col1, col2}
        columnType = {col1, arg, col2, value}
        funcnames = {col1, int2, col2, k}
        interp = cubicspline
        extrap = linear
        fununit = W/m/K
        argunit = K
        plotfuncname = k
        funcs = {{k, 1}}
        nargs = 1
      int3: Interpolation "Electric conductivity"
        importedname = electrical_conductivity.txt
        funcnametable = {sigma, 1}
        funcname = sigma
        table = {{100, 1.85e5}, {150, 1.42e5}, {200, 1.0e5}, {250, 0.725e5}, {300, 0.6e5}, {350, 0.55e5}, {400, 0.70e5}}
        filecolumns = 2
        columnKeys = {col1, col2}
        columnType = {col1, arg, col2, value}
        funcnames = {col1, int3, col2, sigma}
        interp = cubicspline
        extrap = linear
        fununit = S/m
        argunit = K
        plotfuncname = sigma
        funcs = {{sigma, 1}}
        nargs = 1
  mat3: Common "Copper 1" on selection geom1_csel1_dom
    def: def "Basic"
      relpermeability = 1
      electricconductivity = 5.998e7[S/m]
      heatcapacity = 385[J/(kg*K)]
      relpermittivity = 1
      emissivity = 0.5
      density = 8940[kg/m^3]
      thermalconductivity = 400[W/(m*K)]
      seebeckcoefficient = 0
    Enu: Enu "Young's modulus and Poisson's ratio"
      E = 126e9[Pa]
      nu = 0.34
    linzRes: linzRes "Linearized resistivity"
      rho0 = 1.667e-8[ohm*m]
      alpha = 3.862e-3[1/K]
      Tref = 293.15[K]
  mat4: Common "Material 4" (disabled) on selection geom1_csel1_dom
    def: def "Basic"
      thermalconductivity = 1
      density = 1
      heatcapacity = 1
      electricconductivity = 1
      relpermittivity = 1
      seebeckcoefficient = 0

Physics
  ht: HeatTransfer "Heat Transfer in Solids" on all domains
    dependent variable T
    PhysicalModelProperty.BackCompStateT = 0
    ConsistentStabilization.glim = (0.01[K])/ht.helem
    AmbientSettings.ashrae2017LocationInfo = Location: United States North America
    AmbientSettings.ashrae2017CoordinatesInfo = Coordinates:
    AmbientSettings.LocationInfo = Location: United States North America
    AmbientSettings.CoordinatesInfo = Coordinates:
    solid1: SolidHeatTransferModel "Solid 1" (default)
    init1: init "Initial Values 1" (default)
    ins1: ThermalInsulation (default)
    temp1: TemperatureBoundary "Temperature 1" on boundaries 10 | T0 = T0
    temp2: TemperatureBoundary "Temperature 2" on boundaries 3 | T0 = 0[degC]
    pc1: PeriodicHeat "Periodic Condition 1 - x" on boundaries 1, 4, 7, 14-16 | destinationDomains: boundaries 14-16
    pc2: PeriodicHeat "Periodic Condition 2 - y" on boundaries 2, 5, 8, 11-13 | destinationDomains: boundaries 11-13
  ec: ConductiveMedia "Electric Currents" on all domains
    dependent variable V
    PortSweepSettings.PortParamName = PortName
    cucns1: CurrentConservationSolid "Current Conservation in Solids 1" (default) | minput_numberdensity = 0
    ein1: ElectricInsulation (default)
    init1: init "Initial Values 1" (default)
    gnd1: Ground on boundaries 3
    fp1: FloatingPotential on boundaries 10 | Group = 0; I0 = I0
    pc1: PeriodicCondition "Periodic Condition 1 - x" on boundaries 1, 4, 7, 14-16 | destinationDomains: boundaries 14-16
    pc2: PeriodicCondition "Periodic Condition 2 - y" on boundaries 2, 5, 8, 11-13 | destinationDomains: boundaries 11-13

Multiphysics
  tee1: ThermoelectricEffect on all domains | Heat_physics = ht; EMCurrentDensity_physics = ec
  emh1: ElectromagneticHeating "Electromagnetic Heat Source 1" on all domains | EMHeat_physics = ec; Heat_physics = ht

Mesh
  mesh1 "Mesh 1" (physics-controlled)
    size: MeshSizeDefault | hauto = 2

Studies
  std1 "Study 1"
    stat: Stationary
  std2 "Study 2"
    stat: Stationary | disabledcoupling = {tee1, emh1}

Solver configurations
  sol1 "Solution 1" (study std1)
    v1: Variables "Dependent Variables 1"
    s1: Stationary "Stationary Solver 1"
      se1: Segregated
        ss1: SegregatedStep "Electric Currents"
        ss2: SegregatedStep "Temperature"
        ll1: LowerLimit
      i1: Iterative
        mg1: Multigrid
      d1: Direct "Direct, heat transfer variables (ht)"
  sol2 "Solution 2" (study std2)
    v1: Variables "Dependent Variables 1"
    s1: Stationary "Stationary Solver 1"
      se1: Segregated
        ss1: SegregatedStep "Electric Currents"
        ss2: SegregatedStep "Temperature"
        ll1: LowerLimit
      dDef: Direct | linsolver = pardiso

Datasets
  dset1: Solution | solution = sol1
  dset2: Solution | solution = sol2

Derived values
  gev1: EvalGlobal "Global Evaluation 1"
    data = dset1
    table = tbl1
    expr = {ec.fp1.V0, }
    unit = {V, }
    descr = {Floating potential, }
  av1: AvSurface "Surface Average 1" on boundaries 10 | data = dset2; table = tbl2; expr = ec.nJ
  av2: AvSurface "Surface Average 2" on boundaries 3 | data = dset1; table = tbl3; expr = ec.nJ
  av3: AvVolume "Volume Average 3" on domains 2 | data = dset2; table = tbl5; expr = tee1.Zmean*T
  av4: AvSurface "Surface Average 4" on boundaries 10 | data = dset1; table = tbl10; expr = ht.ntflux
  int1: IntSurface "Surface Integration 1" on boundaries 10 | data = dset1; table = tbl6; expr = ec.nJ/ec.fp1.V0; unit = S
  int4: IntSurface "Surface Integration 4" on boundaries 3 | data = dset1; table = tbl9; expr = ec.nJ
  int2: IntSurface "Surface Integration 2" on boundaries 9
    data = dset1
    table = tbl7
    expr = ht.ntflux
    unit = W
    descr = Normal total heat flux
  int3: IntSurface "Surface Integration 3" on boundaries 3 | data = dset2; table = tbl8; expr = ht.ntflux

Plots
  pg1: PlotGroup3D "Temperature (ht)" | data = dset1
    surf1: Surface | expr = T; unit = degC
  pg2: PlotGroup3D "Isothermal Contours (ht)" | data = dset1
    iso1: Isosurface | expr = T; unit = degC; levelrounding = off
  pg3: PlotGroup3D "Electric Potential (ec)" | data = dset2
    surf2: Surface | expr = V; unit = mV
  pg4: PlotGroup3D "Temperature and Voltage" | data = dset1
    surf1: Surface | expr = V; unit = mV; descr = Electric potential
    surf2: Surface | expr = T; unit = degC
      filt1: Filter | expr = x>0.5[mm]
  pg5: PlotGroup3D "Temperature (ht) 1" | data = dset2
    vol1: Volume | expr = T
  pg6: PlotGroup3D "Electric Potential (ec) 1" | data = dset2
    vol1: Volume | expr = V
  pg7: PlotGroup3D "Electric Field (ec)" | data = dset2
    mslc1: Multislice
      expr = ec.normE
      multiplanexmethod = coord
      xcoord = ec.CPx
      multiplaneymethod = coord
      ycoord = ec.CPy
      multiplanezmethod = coord
      zcoord = ec.CPz
    strmsl1: StreamlineMultislice
      expr = {ec.Ex, ec.Ey, ec.Ez}
      multiplanexmethod = coord
      xcoord = ec.CPx
      multiplaneymethod = coord
      ycoord = ec.CPy
      multiplanezmethod = coord
      zcoord = ec.CPz
      tran1: Transparency | transparency = 0.9; expr = T
      filt1: Filter | expr = !isScalingSystemDomain